<?xml version="1.0"?>

<!-- BeamFEMForceField example -->
<Node name="root" dt="0.01" gravity="0 0 -9.81">
    <RequiredPlugin name="SofaOpenglVisual"/>
    <VisualStyle displayFlags="showBehaviorModels showForceFields showCollisionModels" />
    <DefaultPipeline depth="6" verbose="0" draw="0" />
    <BruteForceDetection name="N2" />
    <MinProximityIntersection name="Proximity" alarmDistance="0.03" contactDistance="0.02" />
    <DefaultContactManager name="Response" response="default" />
    <Node name="beam">
        <EulerImplicitSolver rayleighStiffness="0" printLog="false"  rayleighMass="0.1" />
        <BTDLinearSolver template="BTDMatrix6d" printLog="false" verbose="false" />
        <MechanicalObject template="Rigid3d" name="DOFs" position="0 0 0 0 0 0 1  1 0 0 0 0 0 1  2 0 0 0 0 0 1  3 0 0 0 0 0 1  4 0 0 0 0 0 1  5 0 0 0 0 0 1  6 0 0 0 0 0 1  7 0 0 0 0 0 1" />
        <Mesh name="lines" lines="0 1 1 2 2 3 3 4 4 5 5 6 6 7" />
        <FixedConstraint name="FixedConstraint" indices="0" />
        <UniformMass vertexMass="1 1 0.01 0 0 0 0.1 0 0 0 0.1" printLog="false" />
        <BeamFEMForceField name="FEM" radius="0.1" youngModulus="20000000" poissonRatio="0.49"/>
        <Node name="Collision">
            <CubeTopology nx="15" ny="2" nz="2" min="0 -0.1 -0.1" max="7 0.1 0.1" />
            <MechanicalObject />
            <BeamLinearMapping isMechanical="true" />
            <TriangleCollisionModel />
        </Node>
    </Node>

    <Node name="beam2">
        <EulerImplicitSolver rayleighStiffness="0" printLog="false"  rayleighMass="0.1" />
        <BTDLinearSolver template="BTDMatrix6d" printLog="false" verbose="false" />
        <MechanicalObject template="Rigid3d" name="DOFs" position="2 0 -1 0 0 0 1 3 0 -1 0 0 0 1 4 0 -1 0 0 0 1 5 0 -1 0 0 0 1 6 0 -1 0 0 0 1 7 0 -1 0 0 0 1 8 0 -1 0 0 0 1 9 0 -1 0 0 0 1" />
        <Mesh name="lines" lines="0 1 1 2 2 3 3 4 4 5 5 6 6 7" />
        <FixedConstraint name="FixedConstraint" indices="0" />
        <FixedConstraint name="FixedConstraint2" indices="7" />
        <UniformMass vertexMass="1 1 0.01 0 0 0 0.1 0 0 0 0.1" printLog="false" />
        <BeamFEMForceField name="FEM" radius="0.1" youngModulus="20000000" poissonRatio="0.49"/>
        <!-- <Node name="Collision">
            <CubeTopology nx="15" ny="2" nz="2" min="0 -0.1 -0.1" max="7 0.1 0.1" />
            <MechanicalObject />
            <BeamLinearMapping isMechanical="true" />
            <TriangleCollisionModel />
        </Node> -->
        <SphereModel name="SphereCollision" radius="0.2"/>
    </Node>
    <!-- <Node name="beam2">
        <EulerImplicitSolver rayleighStiffness="0" printLog="false" rayleighMass="0.1"/>
        <CGLinearSolver template="NewMat" threshold="0.000000001" tolerance="0.0000000001" iterations="25" printLog="false" />
        <MechanicalObject template="Rigid3d" name="DOFs" position="9 0 -1 0 0 0 1  8 0 -1 0 0 0 1  7 0 -1 0 0 0 1" />
        <Mesh name="lines" lines="0 1 1 2 2 3" />
        <FixedConstraint name="FixedConstraint" indices="0" />
        <UniformMass vertexMass="1 1 0.01 0 0 0 0.1 0 0 0 0.1" />
        <BeamFEMForceField name="FEM" radius="0.05" youngModulus="10000000" poissonRatio="0.49"/>
    </Node> -->
</Node>
