"""
FixedLMConstraintPython
is based on the scene
/Users/marco.magliulo/mySofaCodes/exampleFromSrc/Components/constraint/FixedLMConstraint.scn
but it uses the SofaPython plugin.
Further informations on the usage of the plugin can be found in
sofa/applications/plugins/SofaPython/doc/SofaPython.pdf
To launch the scene, type
runSofa /Users/marco.magliulo/mySofaCodes/exampleFromSrc/Components/constraint/FixedLMConstraintPython.py --argv 123
The sofa python plugin might have to be added in the sofa plugin manager,
i.e. add the sofa python plugin in runSofa->Edit->PluginManager.
The arguments given after --argv can be used by accessing self.commandLineArguments, e.g. combined with ast.literal_eval to convert a string to a number.

The current file has been written by the python script
/Users/marco.magliulo/mySofaCodes/exampleFromSrc/Components/constraint//Users/marco.magliulo/Software/sofa/src/applications/plugins/SofaPython/scn2python.py
Author of scn2python.py: Christoph PAULUS, christoph.paulus@inria.fr
"""

import sys
import Sofa

class FixedLMConstraint (Sofa.PythonScriptController):

    def __init__(self, node, commandLineArguments) :
        self.commandLineArguments = commandLineArguments
        print "Command line arguments for python : "+str(commandLineArguments)
        self.createGraph(node)
        return None;

    def createGraph(self,rootNode):

        # rootNode
        rootNode.createObject('VisualStyle', displayFlags='showCollisionModels showBehaviorModels')
        rootNode.createObject('EulerImplicitSolver', rayleighStiffness='0.1', rayleighMass='0.1')
        rootNode.createObject('CGLinearSolver', threshold='1e-5', tolerance='1e-5', iterations='25')
        rootNode.createObject('LMConstraintSolver', maxError='1e-7', numIterations='27')
        rootNode.createObject('MechanicalObject', position='0 -1 0 0 0 0 1 0 1 0 0 0 0 1', template='Rigid3d')
        rootNode.createObject('UniformMass', template='Rigid3d')
        rootNode.createObject('JointSpringForceField', spring='BEGIN_SPRING  0 1  REST_T 0 0.5 0 END_SPRING ', name='jointSpringFF2', template='Rigid3d')
        rootNode.createObject('FixedLMConstraint', indices='0', template='Rigid3d')

        # rootNode/unnamedNode_0
        unnamedNode_0 = rootNode.createChild('unnamedNode_0')
        self.unnamedNode_0 = unnamedNode_0
        unnamedNode_0.createObject('MeshObjLoader', name='loader', filename='mesh/cube.obj')
        unnamedNode_0.createObject('MeshTopology', src='@loader')
        unnamedNode_0.createObject('MechanicalObject')
        unnamedNode_0.createObject('TriangleCollisionModel')
        unnamedNode_0.createObject('FixedLMConstraint', indices='4 5 6 7')
        unnamedNode_0.createObject('RigidMapping', rigidIndexPerPoint='4 4', input='@..', output='@.')

        return 0;

    def onMouseButtonLeft(self, mouseX,mouseY,isPressed):
        ## usage e.g.
        #if isPressed :
        #    print "Control+Left mouse button pressed at position "+str(mouseX)+", "+str(mouseY)
        return 0;

    def onKeyReleased(self, c):
        ## usage e.g.
        #if c=="A" :
        #    print "You released a"
        return 0;

    def initGraph(self, node):
        ## Please feel free to add an example for a simple usage in /Users/marco.magliulo/mySofaCodes/exampleFromSrc/Components/constraint//Users/marco.magliulo/Software/sofa/src/applications/plugins/SofaPython/scn2python.py
        return 0;

    def onKeyPressed(self, c):
        ## usage e.g.
        #if c=="A" :
        #    print "You pressed control+a"
        return 0;

    def onMouseWheel(self, mouseX,mouseY,wheelDelta):
        ## usage e.g.
        #if isPressed :
        #    print "Control button pressed+mouse wheel turned at position "+str(mouseX)+", "+str(mouseY)+", wheel delta"+str(wheelDelta)
        return 0;

    def storeResetState(self):
        ## Please feel free to add an example for a simple usage in /Users/marco.magliulo/mySofaCodes/exampleFromSrc/Components/constraint//Users/marco.magliulo/Software/sofa/src/applications/plugins/SofaPython/scn2python.py
        return 0;

    def cleanup(self):
        ## Please feel free to add an example for a simple usage in /Users/marco.magliulo/mySofaCodes/exampleFromSrc/Components/constraint//Users/marco.magliulo/Software/sofa/src/applications/plugins/SofaPython/scn2python.py
        return 0;

    def onGUIEvent(self, strControlID,valueName,strValue):
        ## Please feel free to add an example for a simple usage in /Users/marco.magliulo/mySofaCodes/exampleFromSrc/Components/constraint//Users/marco.magliulo/Software/sofa/src/applications/plugins/SofaPython/scn2python.py
        return 0;

    def onEndAnimationStep(self, deltaTime):
        ## Please feel free to add an example for a simple usage in /Users/marco.magliulo/mySofaCodes/exampleFromSrc/Components/constraint//Users/marco.magliulo/Software/sofa/src/applications/plugins/SofaPython/scn2python.py
        return 0;

    def onLoaded(self, node):
        ## Please feel free to add an example for a simple usage in /Users/marco.magliulo/mySofaCodes/exampleFromSrc/Components/constraint//Users/marco.magliulo/Software/sofa/src/applications/plugins/SofaPython/scn2python.py
        return 0;

    def reset(self):
        ## Please feel free to add an example for a simple usage in /Users/marco.magliulo/mySofaCodes/exampleFromSrc/Components/constraint//Users/marco.magliulo/Software/sofa/src/applications/plugins/SofaPython/scn2python.py
        return 0;

    def onMouseButtonMiddle(self, mouseX,mouseY,isPressed):
        ## usage e.g.
        #if isPressed :
        #    print "Control+Middle mouse button pressed at position "+str(mouseX)+", "+str(mouseY)
        return 0;

    def bwdInitGraph(self, node):
        ## Please feel free to add an example for a simple usage in /Users/marco.magliulo/mySofaCodes/exampleFromSrc/Components/constraint//Users/marco.magliulo/Software/sofa/src/applications/plugins/SofaPython/scn2python.py
        return 0;

    def onScriptEvent(self, senderNode, eventName,data):
        ## Please feel free to add an example for a simple usage in /Users/marco.magliulo/mySofaCodes/exampleFromSrc/Components/constraint//Users/marco.magliulo/Software/sofa/src/applications/plugins/SofaPython/scn2python.py
        return 0;

    def onMouseButtonRight(self, mouseX,mouseY,isPressed):
        ## usage e.g.
        #if isPressed :
        #    print "Control+Right mouse button pressed at position "+str(mouseX)+", "+str(mouseY)
        return 0;

    def onBeginAnimationStep(self, deltaTime):
        ## Please feel free to add an example for a simple usage in /Users/marco.magliulo/mySofaCodes/exampleFromSrc/Components/constraint//Users/marco.magliulo/Software/sofa/src/applications/plugins/SofaPython/scn2python.py
        return 0;


def createScene(rootNode):
    rootNode.findData('dt').value = '0.02'
    try :
        sys.argv[0]
    except :
        commandLineArguments = []
    else :
        commandLineArguments = sys.argv
    myFixedLMConstraint = FixedLMConstraint(rootNode,commandLineArguments)
    return 0;
