"""
OscillatorConstraint_rigidPython
is based on the scene
/Users/marco.magliulo/mySofaCodes/exampleFromSrc/Components/constraint/OscillatorConstraint_rigid.scn
but it uses the SofaPython plugin.
Further informations on the usage of the plugin can be found in
sofa/applications/plugins/SofaPython/doc/SofaPython.pdf
To launch the scene, type
runSofa /Users/marco.magliulo/mySofaCodes/exampleFromSrc/Components/constraint/OscillatorConstraint_rigidPython.py --argv 123
The sofa python plugin might have to be added in the sofa plugin manager,
i.e. add the sofa python plugin in runSofa->Edit->PluginManager.
The arguments given after --argv can be used by accessing self.commandLineArguments, e.g. combined with ast.literal_eval to convert a string to a number.

The current file has been written by the python script
/Users/marco.magliulo/mySofaCodes/exampleFromSrc/Components/constraint//Users/marco.magliulo/Software/sofa/src/applications/plugins/SofaPython/scn2python.py
Author of scn2python.py: Christoph PAULUS, christoph.paulus@inria.fr
"""

import sys
import Sofa

class OscillatorConstraint_rigid (Sofa.PythonScriptController):

    def __init__(self, node, commandLineArguments) :
        self.commandLineArguments = commandLineArguments
        print "Command line arguments for python : "+str(commandLineArguments)
        self.createGraph(node)
        return None;

    def createGraph(self,rootNode):

        # rootNode
        rootNode.createObject('VisualStyle', displayFlags='showBehaviorModels')
        rootNode.createObject('EulerExplicitSolver', name='solver')

        # rootNode/Point Oscillator
        Point_Oscillator = rootNode.createChild('Point Oscillator')
        self.Point_Oscillator = Point_Oscillator
        Point_Oscillator.createObject('MechanicalObject', force='1 0 0', name='mech', restScale='1', template='Vec3d', position='0 0 0', showObject='0', velocity='1 0 0', externalForce='1 0 0', derivX='1 0 0')
        Point_Oscillator.createObject('UniformMass', name='m', template='Vec3d')
        Point_Oscillator.createObject('OscillatorConstraint', oscillators='0  1 1 1  1 0 0  1 5', name='osc', template='Vec3d')

        # rootNode/Rigid Oscillator
        Rigid_Oscillator = rootNode.createChild('Rigid Oscillator')
        self.Rigid_Oscillator = Rigid_Oscillator
        Rigid_Oscillator.createObject('MechanicalObject', position='0 0 0 0 0 0 1', name='mech2', template='Rigid3d', velocity='0 0 0 0 0 0')
        Rigid_Oscillator.createObject('UniformMass', name='m2', template='Rigid3d')
        Rigid_Oscillator.createObject('OscillatorConstraint', oscillators='0  1 1 0 0 0 0 1   0 1 1 0 0.707 0.707  1 5', name='osc2', template='Rigid3d')

        return 0;

    def onMouseButtonLeft(self, mouseX,mouseY,isPressed):
        ## usage e.g.
        #if isPressed :
        #    print "Control+Left mouse button pressed at position "+str(mouseX)+", "+str(mouseY)
        return 0;

    def onKeyReleased(self, c):
        ## usage e.g.
        #if c=="A" :
        #    print "You released a"
        return 0;

    def initGraph(self, node):
        ## Please feel free to add an example for a simple usage in /Users/marco.magliulo/mySofaCodes/exampleFromSrc/Components/constraint//Users/marco.magliulo/Software/sofa/src/applications/plugins/SofaPython/scn2python.py
        return 0;

    def onKeyPressed(self, c):
        ## usage e.g.
        #if c=="A" :
        #    print "You pressed control+a"
        return 0;

    def onMouseWheel(self, mouseX,mouseY,wheelDelta):
        ## usage e.g.
        #if isPressed :
        #    print "Control button pressed+mouse wheel turned at position "+str(mouseX)+", "+str(mouseY)+", wheel delta"+str(wheelDelta)
        return 0;

    def storeResetState(self):
        ## Please feel free to add an example for a simple usage in /Users/marco.magliulo/mySofaCodes/exampleFromSrc/Components/constraint//Users/marco.magliulo/Software/sofa/src/applications/plugins/SofaPython/scn2python.py
        return 0;

    def cleanup(self):
        ## Please feel free to add an example for a simple usage in /Users/marco.magliulo/mySofaCodes/exampleFromSrc/Components/constraint//Users/marco.magliulo/Software/sofa/src/applications/plugins/SofaPython/scn2python.py
        return 0;

    def onGUIEvent(self, strControlID,valueName,strValue):
        ## Please feel free to add an example for a simple usage in /Users/marco.magliulo/mySofaCodes/exampleFromSrc/Components/constraint//Users/marco.magliulo/Software/sofa/src/applications/plugins/SofaPython/scn2python.py
        return 0;

    def onEndAnimationStep(self, deltaTime):
        ## Please feel free to add an example for a simple usage in /Users/marco.magliulo/mySofaCodes/exampleFromSrc/Components/constraint//Users/marco.magliulo/Software/sofa/src/applications/plugins/SofaPython/scn2python.py
        return 0;

    def onLoaded(self, node):
        ## Please feel free to add an example for a simple usage in /Users/marco.magliulo/mySofaCodes/exampleFromSrc/Components/constraint//Users/marco.magliulo/Software/sofa/src/applications/plugins/SofaPython/scn2python.py
        return 0;

    def reset(self):
        ## Please feel free to add an example for a simple usage in /Users/marco.magliulo/mySofaCodes/exampleFromSrc/Components/constraint//Users/marco.magliulo/Software/sofa/src/applications/plugins/SofaPython/scn2python.py
        return 0;

    def onMouseButtonMiddle(self, mouseX,mouseY,isPressed):
        ## usage e.g.
        #if isPressed :
        #    print "Control+Middle mouse button pressed at position "+str(mouseX)+", "+str(mouseY)
        return 0;

    def bwdInitGraph(self, node):
        ## Please feel free to add an example for a simple usage in /Users/marco.magliulo/mySofaCodes/exampleFromSrc/Components/constraint//Users/marco.magliulo/Software/sofa/src/applications/plugins/SofaPython/scn2python.py
        return 0;

    def onScriptEvent(self, senderNode, eventName,data):
        ## Please feel free to add an example for a simple usage in /Users/marco.magliulo/mySofaCodes/exampleFromSrc/Components/constraint//Users/marco.magliulo/Software/sofa/src/applications/plugins/SofaPython/scn2python.py
        return 0;

    def onMouseButtonRight(self, mouseX,mouseY,isPressed):
        ## usage e.g.
        #if isPressed :
        #    print "Control+Right mouse button pressed at position "+str(mouseX)+", "+str(mouseY)
        return 0;

    def onBeginAnimationStep(self, deltaTime):
        ## Please feel free to add an example for a simple usage in /Users/marco.magliulo/mySofaCodes/exampleFromSrc/Components/constraint//Users/marco.magliulo/Software/sofa/src/applications/plugins/SofaPython/scn2python.py
        return 0;


def createScene(rootNode):
    rootNode.findData('dt').value = '0.04'
    try :
        sys.argv[0]
    except :
        commandLineArguments = []
    else :
        commandLineArguments = sys.argv
    myOscillatorConstraint_rigid = OscillatorConstraint_rigid(rootNode,commandLineArguments)
    return 0;
