"""
CantileverBeamPython
is based on the scene
/Users/marco.magliulo/mySofaCodes/myScriptsToGetStarted/CantileverBeam.scn
but it uses the SofaPython plugin.
Further informations on the usage of the plugin can be found in
sofa/applications/plugins/SofaPython/doc/SofaPython.pdf
To launch the scene, type
runSofa /Users/marco.magliulo/mySofaCodes/myScriptsToGetStarted/CantileverBeamPython.py --argv 123
The sofa python plugin might have to be added in the sofa plugin manager,
i.e. add the sofa python plugin in runSofa->Edit->PluginManager.
The arguments given after --argv can be used by accessing self.commandLineArguments, e.g. combined with ast.literal_eval to convert a string to a number.

The current file has been written by the python script
/Users/marco.magliulo/mySofaCodes/myScriptsToGetStarted//Users/marco.magliulo/Software/sofa/src/applications/plugins/SofaPython/scn2python.py
Author of scn2python.py: Christoph PAULUS, christoph.paulus@inria.fr
"""

import sys
import Sofa

class CantileverBeam (Sofa.PythonScriptController):

    def __init__(self, node, commandLineArguments) :
        self.commandLineArguments = commandLineArguments
        print "Command line arguments for python : "+str(commandLineArguments)
        self.createGraph(node)
        return None;

    def createGraph(self,rootNode):

        # rootNode
        rootNode.createObject('RequiredPlugin', name='SofaOpenglVisual')
        rootNode.createObject('RequiredPlugin', name='SofaPython')
        rootNode.createObject('VisualStyle', displayFlags='showBehaviorModels showForceFields')
        # rootNode/beam
        nbeam = 2
        '''
        beamL = []
        for i in range(nbeam):
            beam_id = 'beam' + str(i)
            beamL.append(rootNode.createChild(beam_id))
            beam = beamL[-1]
            setattr(self, beam_id, beam)
            beam.createObject('EulerImplicitSolver', rayleighStiffness='0', printLog='false', rayleighMass='0.1')
            beam.createObject('BTDLinearSolver', template='BTDMatrix6d')
            ycoord = (i,) * 3
            beam.createObject('MechanicalObject', position='0 %d 0 0 0 0 1  1 %d 0 0 0 0 1  2 %d 0 0 0 0 1'%ycoord, name='DOFs', template='Rigid3d')
            beam.createObject('Mesh', lines='0 1 1 2', name='lines')
            beam.createObject('FixedConstraint', indices='0', name='FixedConstraint')
            beam.createObject('UniformMass', vertexMass='1 1 0.01 0 0 0 0.1 0 0 0 0.1', printLog='false')
            beam.createObject('BeamFEMForceField', radius='1', name='FEM', poissonRatio='0.49', youngModulus='100')
        '''
        # rootNode/beam
        beam = rootNode.createChild('beam')
        self.beam = beam
        beam.createObject('EulerImplicitSolver', rayleighStiffness='0', printLog='false', rayleighMass='0.1')
        beam.createObject('BTDLinearSolver', printLog='false', template='BTDMatrix6d', verbose='false')
        beam.createObject('MechanicalObject', position='0 0 0 0 0 0 1  1 0 0 0 0 0 1', name='DOFs', template='Rigid3d')
        beam.createObject('Mesh', lines='0 1', name='lines')
        beam.createObject('FixedConstraint', indices='0', name='FixedConstraint')
        beam.createObject('UniformMass', vertexMass='1 1 0.01 0 0 0 0.1 0 0 0 0.1', printLog='false')
        beam.createObject('BeamFEMForceField', radius='0.1', name='FEM', poissonRatio='0.49', youngModulus='20000000')

        # # rootNode/beam2
        beam2 = rootNode.createChild('beam2')
        self.beam2 = beam2
        beam2.createObject('EulerImplicitSolver', rayleighStiffness='0', printLog='false', rayleighMass='0.1')
        beam2.createObject('BTDLinearSolver', printLog='false', template='BTDMatrix6d', verbose='false')
        beam2.createObject('MechanicalObject', position='0 -1 0 0 0 0 1  1 -1 0 0 0 0 1', name='DOFs', template='Rigid3d')
        beam2.createObject('Mesh', lines='0 1 ', name='lines')
        beam2.createObject('FixedConstraint', indices='0', name='FixedConstraint')
        beam2.createObject('UniformMass', vertexMass='1 1 0.01 0 0 0 0.1 0 0 0 0.1', printLog='false')
        beam2.createObject('BeamFEMForceField', radius='0.1', name='FEM', poissonRatio='0.49', youngModulus='20000000')

        return 0;

    def onMouseButtonLeft(self, mouseX,mouseY,isPressed):
        ## usage e.g.
        #if isPressed :
        #    print "Control+Left mouse button pressed at position "+str(mouseX)+", "+str(mouseY)
        return 0;

    def onKeyReleased(self, c):
        ## usage e.g.
        #if c=="A" :
        #    print "You released a"
        return 0;

    def initGraph(self, node):
        ## Please feel free to add an example for a simple usage in /Users/marco.magliulo/mySofaCodes/myScriptsToGetStarted//Users/marco.magliulo/Software/sofa/src/applications/plugins/SofaPython/scn2python.py
        return 0;

    def onKeyPressed(self, c):
        ## usage e.g.
        #if c=="A" :
        #    print "You pressed control+a"
        return 0;

    def onMouseWheel(self, mouseX,mouseY,wheelDelta):
        ## usage e.g.
        #if isPressed :
        #    print "Control button pressed+mouse wheel turned at position "+str(mouseX)+", "+str(mouseY)+", wheel delta"+str(wheelDelta)
        return 0;

    def storeResetState(self):
        ## Please feel free to add an example for a simple usage in /Users/marco.magliulo/mySofaCodes/myScriptsToGetStarted//Users/marco.magliulo/Software/sofa/src/applications/plugins/SofaPython/scn2python.py
        return 0;

    def cleanup(self):
        ## Please feel free to add an example for a simple usage in /Users/marco.magliulo/mySofaCodes/myScriptsToGetStarted//Users/marco.magliulo/Software/sofa/src/applications/plugins/SofaPython/scn2python.py
        return 0;

    def onGUIEvent(self, strControlID,valueName,strValue):
        ## Please feel free to add an example for a simple usage in /Users/marco.magliulo/mySofaCodes/myScriptsToGetStarted//Users/marco.magliulo/Software/sofa/src/applications/plugins/SofaPython/scn2python.py
        return 0;

    def onEndAnimationStep(self, deltaTime):
        ## Please feel free to add an example for a simple usage in /Users/marco.magliulo/mySofaCodes/myScriptsToGetStarted//Users/marco.magliulo/Software/sofa/src/applications/plugins/SofaPython/scn2python.py
        return 0;

    def onLoaded(self, node):
        ## Please feel free to add an example for a simple usage in /Users/marco.magliulo/mySofaCodes/myScriptsToGetStarted//Users/marco.magliulo/Software/sofa/src/applications/plugins/SofaPython/scn2python.py
        return 0;

    def reset(self):
        ## Please feel free to add an example for a simple usage in /Users/marco.magliulo/mySofaCodes/myScriptsToGetStarted//Users/marco.magliulo/Software/sofa/src/applications/plugins/SofaPython/scn2python.py
        return 0;

    def onMouseButtonMiddle(self, mouseX,mouseY,isPressed):
        ## usage e.g.
        #if isPressed :
        #    print "Control+Middle mouse button pressed at position "+str(mouseX)+", "+str(mouseY)
        return 0;

    def bwdInitGraph(self, node):
        ## Please feel free to add an example for a simple usage in /Users/marco.magliulo/mySofaCodes/myScriptsToGetStarted//Users/marco.magliulo/Software/sofa/src/applications/plugins/SofaPython/scn2python.py
        return 0;

    def onScriptEvent(self, senderNode, eventName,data):
        ## Please feel free to add an example for a simple usage in /Users/marco.magliulo/mySofaCodes/myScriptsToGetStarted//Users/marco.magliulo/Software/sofa/src/applications/plugins/SofaPython/scn2python.py
        return 0;

    def onMouseButtonRight(self, mouseX,mouseY,isPressed):
        ## usage e.g.
        #if isPressed :
        #    print "Control+Right mouse button pressed at position "+str(mouseX)+", "+str(mouseY)
        return 0;

    def onBeginAnimationStep(self, deltaTime):
        ## Please feel free to add an example for a simple usage in /Users/marco.magliulo/mySofaCodes/myScriptsToGetStarted//Users/marco.magliulo/Software/sofa/src/applications/plugins/SofaPython/scn2python.py
        return 0;


def createScene(rootNode):
    rootNode.findData('dt').value = '0.01'
    rootNode.findData('gravity').value = '0 0 -9.81'
    try :
        sys.argv[0]
    except :
        commandLineArguments = []
    else :
        commandLineArguments = sys.argv
    myCantileverBeam = CantileverBeam(rootNode,commandLineArguments)
    return 0;
